** ------------------------------------- **
*HEADING
**
*Node
	1	,	-600	,	150
2	,	-595	,	150
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**
** ------------------------------------- **
**
** Defining user element U1
*User element,nodes=8,type=U1,properties=11,coordinates=2,VARIABLES=1080,Unsymm
	1, 2, 11
*Element, type=U1,elset=NC
1	,	363	,	365	,	3	,	1	,	364	,	243	,	2	,	242
2	,	365	,	367	,	5	,	3	,	366	,	244	,	4	,	243
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**
*Uel property, elset=NC
 30000, 0.2, 300, 0.0001, 300
**
**
**
*Element, type=U1,elset=UHPC
1081	,	3621	,	3623	,	13261	,	13259	,	3622	,	3501	,	13260	,	3500
1082	,	3623	,	3625	,	13263	,	13261	,	3624	,	3502	,	13262	,	3501
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**
*Uel property, elset=UHPC
	75000, 0.2, 300, 0.00020, 100
**
**
*Element, type=CPS8,elset=rigid
	1801	,	5682	,	5684	,	5449	,	5447	,	5683	,	5673	,	5448	,	5672
	1802	,	5684	,	5686	,	5451	,	5449	,	5685	,	5674	,	5450	,	5673
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**
**
**
**
*Element, TYPE=CPS8, elset=MIRROR
10001	,	363	,	365	,	3	,	1	,	364	,	243	,	2	,	242
10002	,	365	,	367	,	5	,	3	,	366	,	244	,	4	,	243
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	**
*Element, TYPE=CPS4, elset=MIRROR_COH
	11833	,	31211	,	31212	,	21212	,	21211
	11834	,	31212	,	31213	,	21213	,	21212
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*Solid Section, elset=MIRROR, material=umatelemX
	1.0
*Solid Section, elset=MIRROR_COH, material=umatelemX
	1.0
*Material, name=umatelemX
*Depvar
	120,
*User Material, constants=2
	1.0e-11, 0.2
** ------------------------------------- **
*user element, type=U6, nodes=6, coordinates=2, iproperties=2, properties=7, variables=60
	1, 2
*element, type=U6,elset=INTERFACE
1833	,	13259	,	13261	,	13260	,	3259	,	3261	,	3260
1834	,	13261	,	13263	,	13262	,	3261	,	3263	,	3262
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*UEL PROPERTY, ELSET=INTERFACE
	600., 0.0002, 0.00000
** ------------------------------------- **
*Nset, nset=loading
  5770, 5779
*Nset, nset=support
  5714, 5723
*Nset, nset=middle
  5551
*Solid Section, elset=rigid, material=rigid
** ------------------------------------- **
*Material, name=rigid
*Elastic
  90000., 0.0
** ----------------------------------------------------------------
**
** STEP: Step-1
**
*Boundary
   support, 2, 2
   middle, 1, 1
*step, inc=100000, NLGEOM
*static
   0.1, 250, 0.00001, 2
*Boundary
   loading, 2, 2, -2.5
**
** CONTROLS
**
*Controls, reset
*Controls, parameters=line search
, , , ,
*Controls, parameters=field, field=displacement
100, 1, , , , , ,
*Controls, parameters=field, field=hydrostatic fluid pressure
100, 1, , , , , ,
*Controls, parameters=field, field=rotation
100, 1, , , , , ,
*Controls, parameters=field, field=electrical potential
100, 1, , , , , ,
**
** OUTPUT REQUESTS
**
*Restart, write, frequency=0
**
** FIELD OUTPUT: F-Output-1
**
**
*Output, field
*Node Output
 U, RF
*Element Output, directions=YES
 S, SDV,
**
** HISTORY OUTPUT: H-Output-1
**
*Output, history, variable=PRESELECT
**
*end step
